*HEADING
Aluminum fin analytic validation (adiabatic tip)
*NODE
1, 1.00000000e+02, 1.22464680e-15, 5.00000000e+00
2, 0.00000000e+00, 1.22464680e-15, 5.00000000e+00
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*ELEMENT, TYPE=C3D4, ELSET=Eall
1, 99, 4454, 5163, 5564
2, 2894, 5191, 4446, 7764
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*NSET, NSET=Nbase
3793, 3794, 3795, 3796, 3797, 3798
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*NSET, NSET=Nall
1, 2, 3, 4, 5, 6
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*MATERIAL, NAME=Al
*CONDUCTIVITY
2.00000000e+02
*SOLID SECTION, ELSET=Eall, MATERIAL=Al
*INITIAL CONDITIONS, TYPE=TEMPERATURE
Nall, 20
*STEP
*HEAT TRANSFER, STEADY STATE
1., 1.
*BOUNDARY
Nbase, 11, 11, 100
*FILM
102, F1, 20, 1.00000000e-02
170, F1, 20, 1.00000000e-02
213, F1, 20, 1.00000000e-02
215, F1, 20, 1.00000000e-02
443, F1, 20, 1.00000000e-02
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37114, F4, 20, 1.00000000e-02
*NODE FILE
NT
*END STEP
