*HEADING
NAUO3 cantilever: SPC prox, distributing distal, GRAV
*NODE
1, 5.76322250e+01, 5.81454529e+02, 1.10518715e+02
2, 5.74334869e+01, 5.79413330e+02, 1.14177246e+02
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*ELEMENT, TYPE=C3D4, ELSET=Eall
1, 16163, 18173, 21915, 29722
2, 20409, 22091, 18374, 35203
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*NSET, NSET=Nprox
1292, 1293, 1406, 1408, 1418, 1419
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*NSET, NSET=Nref
38812,
*SURFACE, NAME=Sdist, TYPE=ELEMENT
5905, S1
12891, S1
13644, S1
17674, S1
24846, S1
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191234, S4
*MATERIAL, NAME=AlUR
*ELASTIC
70000.0, 0.33
*DENSITY
1.66233566e-09
*SOLID SECTION, ELSET=Eall, MATERIAL=AlUR
*COUPLING, CONSTRAINT NAME=RBE3dist, REF NODE=38812, SURFACE=Sdist
*DISTRIBUTING
1, 6
*BOUNDARY
Nprox, 1, 3
*STEP
*STATIC
*DLOAD
Eall, GRAV, 9.80665000e+03, -2.15805817e-06, 1.91577258e-03, -9.99998165e-01
*CLOAD
38812, 1, -2.30278097e-04
38812, 2, 2.04424733e-01
38812, 3, -1.06705963e+02
38812, 4, -4.43767744e+04
38812, 5, -4.99890548e+01
38812, 6, 1.87943069e-17
*NODE FILE
U, RF
*EL FILE
S
*NODE PRINT, NSET=Nprox, TOTALS
RF
*END STEP
